*HEADING
SHPB avec inverseur de charge (LID) -- eprouvette __SPEC__ -- calcul __CASE_ID__
**
** ==========================================================================
** SHPB_UT_main.inp -- MODELE PRINCIPAL (gabarit)
** ==========================================================================
** Ce fichier est un GABARIT : scripts/pre/ le copie dans runs/<case_id>/ en
** remplacant deux jetons (mots entoures de deux soulignes "__") :
**     SPEC     -> nom de l'eprouvette   (UT19 ou UT40)
**     CASE_ID  -> nom du calcul         (ex. UT19_R0500_00)
** Tous les fichiers inclus (*.geo, *.dat) sont copies a cote du .inp :
** les *INCLUDE n'ont donc pas de chemin.
**
** Unites : mm, N, s, MPa, t/mm^3
** Demi-modele : symetrie par rapport au plan X = 0
**
** ==========================================================================
** 1. MAILLAGE  (un .geo par piece, genere par scripts/pre/inp_to_geo.py)
** ==========================================================================
** Noeuds et elements sont deja en coordonnees globales.
** Labels : piece n -> n*1 000 000 + ...  (STRIKER 1M, INPUT_BAR 2M, ...)
**
*INCLUDE, INPUT=STRIKER.geo
*INCLUDE, INPUT=INPUT_BAR.geo
*INCLUDE, INPUT=PUSHER_ROD.geo
*INCLUDE, INPUT=PUSHER_HEAD.geo
*INCLUDE, INPUT=__SPEC__.geo
*INCLUDE, INPUT=OUTPUT_BAR.geo
*INCLUDE, INPUT=OUTPUT_HEAD.geo
**
** ==========================================================================
** 2. MATERIAUX  (generes par scripts/pre/make_materials.py)
** ==========================================================================
*MATERIAL, NAME=MARAGING
*INCLUDE, INPUT=MARAGING.dat
*MATERIAL, NAME=STRIKER_STEEL
*INCLUDE, INPUT=STRIKER_STEEL.dat
*MATERIAL, NAME=DP1000
*INCLUDE, INPUT=DP1000.dat
**
** ==========================================================================
** 3. SECTIONS  (affectation d'un materiau a chaque piece)
** ==========================================================================
** Barres, pusher et tetes : maraging (Beerli et al. 2026)
*SOLID SECTION, ELSET=INPUT_BAR_ALL, MATERIAL=MARAGING
,
*SOLID SECTION, ELSET=PUSHER_ROD_ALL, MATERIAL=MARAGING
,
*SOLID SECTION, ELSET=PUSHER_HEAD_ALL, MATERIAL=MARAGING
,
*SOLID SECTION, ELSET=OUTPUT_BAR_ALL, MATERIAL=MARAGING
,
*SOLID SECTION, ELSET=OUTPUT_HEAD_ALL, MATERIAL=MARAGING
,
** Striker : acier (c = 4720 m/s mesuree)
*SOLID SECTION, ELSET=STRIKER_ALL, MATERIAL=STRIKER_STEEL
,
** Eprouvette
*SOLID SECTION, ELSET=__SPEC___ALL, MATERIAL=DP1000
,
**
** ==========================================================================
** 4. LIAISONS (ties)
** ==========================================================================
** Le pusher et la barre de sortie ont ete coupes en deux dans build_bench.py
** (partie ronde en hexaedres, tete en tetraedres). On recolle les deux moities
** sur leur plan de coupe : tous les deplacements sont transmis, comme si la
** piece etait d'un seul bloc.
**
** Ligne de donnees : surface SECONDAIRE, surface PRINCIPALE.
** Secondaire = maillage le plus fin (ici la tete en tetraedres de 2 mm) :
** ses noeuds sont attaches aux facettes de la surface principale.
**   ADJUST=YES             : les noeuds secondaires sont ramenes sur la surface
**                            principale au debut du calcul (ecart < 0,05 mm ici,
**                            du aux cordes du maillage sur les bords courbes)
**   POSITION TOLERANCE=0.2 : on ne lie que les noeuds secondaires a moins de
**                            0,2 mm de la surface principale (la couche de
**                            noeuds suivante est a ~1 mm : elle n'est pas prise)
**
** Pusher, coupe en Y = 125
*TIE, NAME=TIE_PUSHER, ADJUST=YES, POSITION TOLERANCE=0.2
PUSHER_HEAD_S_TIE, PUSHER_ROD_S_TIE
** Barre de sortie, coupe en Y = 100
*TIE, NAME=TIE_OUTPUT, ADJUST=YES, POSITION TOLERANCE=0.2
OUTPUT_HEAD_S_TIE, OUTPUT_BAR_S_TIE
**
** ==========================================================================
** 5. CONTACTS                                        -> bloc suivant
** 6. CONDITIONS AUX LIMITES ET VITESSE INITIALE      -> a venir
** 7. STEP DYNAMIC EXPLICIT ET SORTIES                -> a venir
** ==========================================================================
